*Heading
** Job name: LT03D_LK02D_C10012_L1p5m_E1 Model name: LT03D_LK02D_C10012_L1p5m_E1
** Generated by: Abaqus/CAE 2022
*Preprint, echo=NO, model=NO, history=NO, contact=NO
**
** PARTS
**
*Part, name=C10012
*End Part
**
*Part, name=Plate
*End Part
**
**
** ASSEMBLY
**
*Assembly, name=Assembly
**
*Instance, name=C10012, part=C10012
          0.,           1.,           0.
*Node
      1,   35.7999992,       -15.96,         761.
      2,   35.7999992,       -15.96,        1420.
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*Element, type=S4R
  1,   1, 155, 416,   4
  2, 155, 156, 415, 416
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*Element, type=S3
14973,    6, 7818,    7
14974,   51,    7, 7818
14975,    1,    4, 7819
14976, 7819,    4,  104
14977,  129, 7820,  106
14978,   73,  106, 7820
14979,   56,   54, 7821
14980, 7821,   54,   70
*Nset, nset="Flats part"
     9,    10,    11,    12,    15,    16
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*Elset, elset="Flats part"
   265,   267,   268,   269,   270,   271
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*Nset, nset="Corner parts"
   10,   11,   13,   14,   16,   17
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*Elset, elset="Corner parts"
   266,   399,   400,   401,   402,   403
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*Nset, nset=_PickedSet61, internal
     1,     2,     3,     4,     5,     6
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*Elset, elset=_PickedSet61, internal
     1,     2,     3,     4,     5,     6
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** Section: Member
*Shell Section, elset=_PickedSet61, material="Steel - Flat Parts", offset=SPOS
1.2, 5
** Section: Member-corner
*Shell Section, elset="Corner parts", material="Steel - Flat Parts", offset=SPOS
1.2, 5
*End Instance
**
*Instance, name=Plate-1, part=Plate
          0.,           0.,         -40.
*Node
      1,           0.,        -100.,          40.
      2,           0.,           0.,          40.
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*Element, type=C3D8R
  1,  124,  730, 1948,  634,    1,   19,  346,   68
  2,  730,  731, 1949, 1948,   19,   20,  347,  346
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*Nset, nset=PlateMaterials, generate
    1,  3675,     1
*Elset, elset=PlateMaterials, generate
    1,  2720,     1
** Section: Support
*Solid Section, elset=PlateMaterials, material="Steel - Flat Parts"
,
*End Instance
**
*Instance, name=Plate-2, part=Plate
          0., -7.105427357601e-15,        1420.
*Node
      1,           0.,        -100.,          40.
      2,           0.,           0.,          40.
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*Element, type=C3D8R
  1,  124,  730, 1948,  634,    1,   19,  346,   68
  2,  730,  731, 1949, 1948,   19,   20,  347,  346
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*Nset, nset=PlateMaterials, generate
    1,  3675,     1
*Elset, elset=PlateMaterials, generate
    1,  2720,     1
** Section: Support
*Solid Section, elset=PlateMaterials, material="Steel - Flat Parts"
,
*End Instance
**
*Nset, nset=BC-1, instance=Plate-1
   5,   6,  14,  78,  79,  80
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*Nset, nset=BC-2, instance=Plate-2
   2,   3,  13,  28,  29,  30
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*Nset, nset=NodesA, instance=C10012
    5,    8,   17,   18,   22,   26
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*Nset, nset=NodesB, instance=C10012
    2,    3,  118,  119,  120,  121
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*Elset, elset=_Plate-front-A_S2, internal, instance=Plate-1, generate
   1,  170,    1
*Elset, elset=_Plate-front-A_S4, internal, instance=Plate-1, generate
  684,  2040,     4
*Elset, elset=_Plate-front-A_S6, internal, instance=Plate-1, generate
 2041,  2717,     4
*Surface, type=ELEMENT, name=Plate-front-A
_Plate-front-A_S2, S2
_Plate-front-A_S4, S4
_Plate-front-A_S6, S6
*Elset, elset=_Plate-front-B_S6, internal, instance=Plate-2, generate
  681,  2037,     4
*Elset, elset=_Plate-front-B_S4, internal, instance=Plate-2, generate
 2044,  2720,     4
*Elset, elset=_Plate-front-B_S1, internal, instance=Plate-2, generate
 511,  680,    1
*Surface, type=ELEMENT, name=Plate-front-B
_Plate-front-B_S6, S6
_Plate-front-B_S4, S4
_Plate-front-B_S1, S1
*Surface, type=NODE, name=NodesA_CNS_, internal
NodesA, 1.
*Surface, type=NODE, name=NodesB_CNS_, internal
NodesB, 1.
** Constraint: Tie_A
*Tie, name=Tie_A, adjust=no
NodesA_CNS_, Plate-front-A
** Constraint: Tie_B
*Tie, name=Tie_B, adjust=no
NodesB_CNS_, Plate-front-B
*End Assembly
**
** MATERIALS
**
*Material, name="Steel - Corners"
*Density
 7.85e-05,
*Elastic
208107., 0.3
*Plastic
 574.57,     0.
 586.15, 0.0009
 604.45,  0.002
 613.35, 0.0031
 626.11, 0.0044
 627.97, 0.0056
 632.79, 0.0098
 636.68,  0.011
 639.44,  0.013
  642.4, 0.0148
*Material, name="Steel - Flat Parts"
*Density
 7.85e-05,
*Elastic
209570., 0.3
*Plastic
 377.86,     0.
 406.47, 0.0001
 417.42, 0.0002
 448.66, 0.0003
 462.26, 0.0004
 468.98, 0.0006
 476.53,  0.001
 484.03, 0.0016
 490.46,  0.004
 495.51, 0.0078
 501.51, 0.0125
 508.47, 0.0176
 517.72, 0.0244
 533.44, 0.0389
 544.46, 0.0538
 549.69, 0.0633
**
** BOUNDARY CONDITIONS
**
** Name: BC-1 Type: Displacement/Rotation
*Boundary
BC-1, 1, 1
BC-1, 2, 2
BC-1, 3, 3
** Name: BC-2 Type: Displacement/Rotation
*Boundary
BC-2, 1, 1
BC-2, 2, 2
BC-2, 3, 3
** ----------------------------------------------------------------
**
** STEP: Step-1
**
*Step, name=Step-1, nlgeom=YES, inc=60
*Static, riks
1e-07, 1e-07, 1e-20, 1e+15, ,
**
** BOUNDARY CONDITIONS
**
** Name: BC-2 Type: Displacement/Rotation
*Boundary
BC-2, 3, 3, -0.001
**
** CONTROLS
**
*Controls, reset
*Controls, parameters=time incrementation
100, 100, , , , , , 500, , ,
**
** OUTPUT REQUESTS
**
*Restart, write, frequency=0
**
** FIELD OUTPUT: F-Output-1
**
*Output, field, variable=PRESELECT
**
** HISTORY OUTPUT: H-Output-1
**
*Output, history, variable=PRESELECT
*End Step
